# OpenSim document version 40000
Model Thoracolumbar_Spine_With_RibCage:
  gravity: 0 -9.8066 0
  length_units: meters
  force_units: N
  credits:
    This model was created by Dan Nicolella, Travis Eliason, and Brian Swenson at SwRI. Portions of this model taken from the publications listed below.
  publications:
    "Holzbaur KR, Murray WM, Delp SL.: A model of the upper extremity for simulating musculoskeletal surgery and analyzing neuromuscular control., Ann Biomed Eng. 2005 Jun;33(6):829-40. (2005)", "Bruno, A.G., M.L. Bouxsein, and D.E. Anderson, Development and validation of a musculoskeletal model of the fully articulated thoracolumbar spine and rib cage. Journal of Biomechanical Engineering, 137(8), 081003, 2015. doi: 10.1115/1.4030408", "Hamner, SR, Seth, A, and Delp, SL, Muscle contributions to propulsion and support during running. Journal of Biomechanics, doi:10.1016/j.jbiomech.2010.06.025 (2010)".
  Ground: meshes=
  BodySet:
    Body pelvis: mass=0.0001 [kg] mass_center=(0 0 0) inertia=(0.0001422149 0.0001106023 0.0001106023 0 0 0)
        meshes=(pelvis_rv.vtp pelvis_lv.vtp sacrum.vtp)
    Body head_neck: mass=5.4132 mass_center=(0 0.1183265 0) inertia=(9.402235e-5 9.402235e-5 9.402235e-5 0 0 0)
        meshes=(cerv6.vtp cerv5.vtp cerv4.vtp cerv3.vtp cerv2.vtp cerv1.vtp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)
    Body torso: mass=26.8266 mass_center=(-0.03219531 0.3434167 0) inertia=(1.660382 0.7944899 1.660382 0 0 0)
        meshes=(hat_spine_trimmed.stl hat_ribs.vtp)
    Body sternumR: mass=0.0001 mass_center=(0 0 0) inertia=(0.0001051608 0.0001101659 0.0001101659 0 0 0)
        meshes=Sternum.vtp
    Body sternumL: mass=0.0001 mass_center=(0 0 0) inertia=(0.0001051608 0.0001101659 0.0001101659 0 0 0)
        meshes=Sternum.vtp
    Body clavicle_R: mass=0.0001 mass_center=(0 0 0) inertia=(0.0001051608 0.0001101659 0.0001101659 0 0 0)
        meshes=clavicle.vtp
    Body scapula_R: mass=0.0001 mass_center=(0 0 0) inertia=(0.0001051608 0.0001101659 0.0001101659 0 0 0)
        meshes=scapula.vtp
    Body humerus_R: mass=2.1138 mass_center=(0 -0.1027851 0) inertia=(7.371005e-5 7.371005e-5 7.371005e-5 0 0 0)
        meshes=humerus.vtp
    Body ulna_R: mass=0.6075 mass_center=(0 -0.1054332 0) inertia=(7.653086e-5 7.653086e-5 7.653086e-5 0 0 0)
        meshes=ulna.vtp
    Body radius_R: mass=0.6075 mass_center=(0 -0.1054332 0) inertia=(7.653086e-5 7.653086e-5 7.653086e-5 0 0 0)
        meshes=radius.vtp
      WrapTorus ECU: xyz_body_rotation=(-0.98664 -0.14888 0.2227) translation=(-0.01425955 -0.2114438 0.03053119)
          quadrant=all inner_radius=0.005248915 outer_radius=0.007873373
    Body hand_R: mass=0.4575 mass_center=(0 -0.068095 0) inertia=(0.0001 0.0001 0.0001 0 0 0)
        meshes=(pisiform.vtp scaphoid.vtp triquetrum.vtp hamate.vtp capitate.vtp trapezoid.vtp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)
      WrapTorus ECRL: xyz_body_rotation=(1.5383 0.2344 0.73112) translation=(0.0222 -0.0096 0.0208) quadrant=all
          inner_radius=0.008 outer_radius=0.016
      WrapTorus ECRB: xyz_body_rotation=(1.3127 -0.11781 -0.11624) translation=(0.0126 -0.0095 0.0186) quadrant=all
          inner_radius=0.008 outer_radius=0.01
      WrapTorus FCR: xyz_body_rotation=(-1.556 -0.15324 -0.10001) translation=(0.0032 -0.0045 -0.019) quadrant=all
          inner_radius=0.001 outer_radius=0.0025
      WrapTorus FCU: xyz_body_rotation=(-1.5738 -0.079762 0.39235) translation=(-0.0123 -0.0124 -0.0171) quadrant=all
          inner_radius=0.0068 outer_radius=0.008
    Body clavicle_L: mass=0.0001 mass_center=(0 0 0) inertia=(0.0001051608 0.0001101659 0.0001101659 0 0 0)
        meshes=clavicle_l.vtp
    Body scapula_L: mass=0.0001 mass_center=(0 0 0) inertia=(0.0001051608 0.0001101659 0.0001101659 0 0 0)
        meshes=scapula_l.vtp
    Body humerus_L: mass=2.1138 mass_center=(0 -0.1117859 0) inertia=(8.718484e-5 8.718484e-5 8.718484e-5 0 0 0)
        meshes=humerus_l.vtp
    Body ulna_L: mass=0.6075 mass_center=(0 -0.105168 0) inertia=(7.614634e-5 7.614634e-5 7.614634e-5 0 0 0)
        meshes=ulna_l.vtp
    Body radius_L: mass=0.6075 mass_center=(0 -0.105168 0) inertia=(7.614634e-5 7.614634e-5 7.614634e-5 0 0 0)
        meshes=radius_l.vtp
      WrapTorus ECU_l: xyz_body_rotation=(0.98664 0.14888 0.2227) translation=(-0.01422369 -0.2109119 -0.03045439)
          quadrant=all inner_radius=0.005235712 outer_radius=0.007853569
    Body hand_L: mass=0.4575 mass_center=(0 -0.068095 0) inertia=(0.0001 0.0001 0.0001 0 0 0)
        meshes=(pisiform_l.vtp scaphoid_l.vtp triquetrum_l.vtp hamate_l.vtp capitate_l.vtp trapezoid_l.vtp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)
      WrapTorus ECRL_l: xyz_body_rotation=(-1.5383 -0.2344 0.73112) translation=(0.0222 -0.0096 -0.0208) quadrant=all
          inner_radius=0.008 outer_radius=0.016
      WrapTorus ECRB_l: xyz_body_rotation=(-1.3127 0.11781 -0.11624) translation=(0.0126 -0.0095 -0.0186) quadrant=all
          inner_radius=0.008 outer_radius=0.01
      WrapTorus FCR_l: xyz_body_rotation=(1.556 0.15324 -0.10001) translation=(0.0032 -0.0045 0.019) quadrant=all
          inner_radius=0.001 outer_radius=0.0025
      WrapTorus FCU_l: xyz_body_rotation=(1.5738 0.079762 0.39235) translation=(-0.0123 -0.0124 0.0171) quadrant=all
          inner_radius=0.0068 outer_radius=0.008
    Body femur_r: mass=9.3014 mass_center=(0 -0.1632106 0) inertia=(0.1234182 0.03235236 0.1301468 0 0 0)
        meshes=femur_r.vtp
    Body tibia_r: mass=3.7075 mass_center=(0 -0.1946291 0) inertia=(0.05477186 0.005542391 0.05553258 0 0 0)
        meshes=(tibia_r.vtp fibula_r.vtp)
    Body talus_r: mass=0.1 mass_center=(0 0 0) inertia=(0.001 0.001 0.001 0 0 0) meshes=talus_rv.vtp
    Body calcn_r: mass=1.25 mass_center=(0.08829105 0.02648731 0) inertia=(0.001091343 0.003040171 0.003196077 0 0 0)
        meshes=foot.vtp
    Body toes_r: mass=0.2166 mass_center=(0.0346 0.006 -0.0175) inertia=(0.0001 0.0002 0.001 0 0 0) meshes=bofoot.vtp
    Body femur_l: mass=9.3014 mass_center=(0 -0.1630394 0) inertia=(0.1231595 0.03228452 0.1298739 0 0 0)
        meshes=femur_l.vtp
    Body tibia_l: mass=3.7075 mass_center=(0 -0.1970053 0) inertia=(0.05611742 0.005678548 0.05689682 0 0 0)
        meshes=(tibia_l.vtp fibula_l.vtp)
    Body talus_l: mass=0.1 mass_center=(0 0 0) inertia=(0.001 0.001 0.001 0 0 0) meshes=talus_lv.vtp
    Body calcn_l: mass=1.25 mass_center=(0.08497408 0.02549222 0) inertia=(0.001010883 0.002816032 0.002960444 0 0 0)
        meshes=l_foot.vtp
    Body toes_l: mass=0.2166 mass_center=(0.0346 0.006 0.0175) inertia=(0.0001 0.0002 0.001 0 0 0) meshes=l_bofoot.vtp
  JointSet:
    CustomJoint gndpelvis: socket_parent_frame=ground_offset socket_child_frame=pelvis_offset
      Coordinate pelvic_tilt: default_value=0 range=(-30.15371 30.15357) clamped=false
      Coordinate pelvic_list: default_value=0 range=(-30.15371 30.15357) clamped=false
      Coordinate pelvic_rotation: default_value=0 range=(-999.9 999.9) clamped=false
      Coordinate pelvic_tx: default_value=0 range=(-5 5) clamped=false
      Coordinate pelvic_ty: default_value=4.358355e-8 range=(-1 2) clamped=false
      Coordinate pelvic_tz: default_value=0 range=(-3 3) clamped=false
      PhysicalOffsetFrame ground_offset: socket_parent=/ground translation=(0 0.9 0) [meters]
      PhysicalOffsetFrame pelvis_offset: socket_parent=/bodyset/pelvis translation=(-0.07110094 -0.03577617 0)
      SpatialTransform:
        TransformAxis rotation1: coordinates=pelvic_tilt axis=(0 0 1) LinearFunction(coefficients=1 0)
        TransformAxis rotation2: coordinates=pelvic_list axis=(1 0 0) LinearFunction(coefficients=1 0)
        TransformAxis rotation3: coordinates=pelvic_rotation axis=(0 1 0) LinearFunction(coefficients=1 0)
        TransformAxis translation1: coordinates=pelvic_tx axis=(1 0 0) LinearFunction(coefficients=1 0)
        TransformAxis translation2: coordinates=pelvic_ty axis=(0 1 0) LinearFunction(coefficients=1 0)
        TransformAxis translation3: coordinates=pelvic_tz axis=(0 0 1) LinearFunction(coefficients=1 0)
    CustomJoint back: socket_parent_frame=pelvis_offset socket_child_frame=torso_offset
      Coordinate lumbar_extension: default_value=0 range=(-1.570796 1.570796) clamped=true
      Coordinate lumbar_bending: default_value=0 range=(-1.570796 1.570796) clamped=true
      Coordinate lumbar_rotation: default_value=0 range=(-1.570796 1.570796) clamped=true
      PhysicalOffsetFrame pelvis_offset: socket_parent=/bodyset/pelvis translation=(-0.08949831 0.04191775 0)
      PhysicalOffsetFrame torso_offset: socket_parent=/bodyset/torso translation=(0 0 0)
      SpatialTransform: axes_held_at_zero=(translation1 translation2 translation3)
        TransformAxis rotation1: coordinates=lumbar_extension axis=(0 0 1) LinearFunction(coefficients=1 0)
        TransformAxis rotation2: coordinates=lumbar_bending axis=(1 0 0) LinearFunction(coefficients=1 0)
        TransformAxis rotation3: coordinates=lumbar_rotation axis=(0 1 0) LinearFunction(coefficients=1 0)
    CustomJoint T1_head_neck: socket_parent_frame=torso_offset socket_child_frame=head_neck_offset
      Coordinate neck_flex: default_value=0 range=(-1.570796 1.570796) clamped=true
      Coordinate neck_tilt: default_value=0 range=(-1.570796 1.570796) clamped=true
      Coordinate neck_rot: default_value=0 range=(-1.570796 1.570796) clamped=true
      Coordinate neck_tx1: default_value=0 range=(-0.15 0.15) clamped=true
      Coordinate neck_ty1: default_value=0 range=(-0.15 0.15) clamped=true
      Coordinate neck_tz1: default_value=0 range=(-0.15 0.15) clamped=true
      PhysicalOffsetFrame torso_offset: socket_parent=/bodyset/torso translation=(-0.0180723 0.4529098 0)
      PhysicalOffsetFrame head_neck_offset: socket_parent=/bodyset/head_neck translation=(0 0 0)
      SpatialTransform:
        TransformAxis rotation1: coordinates=neck_flex axis=(0 0 1) LinearFunction(coefficients=1 0)
        TransformAxis rotation2: coordinates=neck_tilt axis=(1 0 0) LinearFunction(coefficients=1 0)
        TransformAxis rotation3: coordinates=neck_rot axis=(0 1 0) LinearFunction(coefficients=1 0)
        TransformAxis translation1: coordinates=neck_tx1 axis=(1 0 0) LinearFunction(coefficients=1 0)
        TransformAxis translation2: coordinates=neck_ty1 axis=(0 1 0) LinearFunction(coefficients=1 0)
        TransformAxis translation3: coordinates=neck_tz1 axis=(0 0 1) LinearFunction(coefficients=1 0)
    CustomJoint r1R_sterR_jnt: socket_parent_frame=torso_offset socket_child_frame=sternumR_offset
      Coordinate SternumRRotZ: default_value=0 range=(-0.25 0.25) clamped=true locked=true
      Coordinate SternumRRotX: default_value=0 range=(-0.25 0.25) clamped=true locked=true
      Coordinate SternumRRotY: default_value=0 range=(-0.25 0.25) clamped=true locked=true
      Coordinate SternumRX: default_value=0 range=(-0.15 0.15) clamped=true
      Coordinate SternumRY: default_value=0 range=(-0.15 0.15) clamped=true
      Coordinate SternumRZ: default_value=0 range=(-0.15 0.15) clamped=true
      PhysicalOffsetFrame torso_offset: socket_parent=/bodyset/torso translation=(0.06529632 0.3975856 0.03721609)
      PhysicalOffsetFrame sternumR_offset: socket_parent=/bodyset/sternumR translation=(0 0 0)
      SpatialTransform:
        TransformAxis rotation1: coordinates=SternumRRotZ axis=(0 0 1) LinearFunction(coefficients=1 0)
        TransformAxis rotation2: coordinates=SternumRRotX axis=(1 0 0) LinearFunction(coefficients=1 0)
        TransformAxis rotation3: coordinates=SternumRRotY axis=(0 1 0) LinearFunction(coefficients=1 0)
        TransformAxis translation1: coordinates=SternumRX axis=(1 0 0) LinearFunction(coefficients=1 0)
        TransformAxis translation2: coordinates=SternumRY axis=(0 1 0) LinearFunction(coefficients=1 0)
        TransformAxis translation3: coordinates=SternumRZ axis=(0 0 1) LinearFunction(coefficients=1 0)
    CustomJoint r1L_sterL_jnt: socket_parent_frame=torso_offset socket_child_frame=sternumL_offset
      Coordinate SternumLRotZ: default_value=0 range=(-0.25 0.25) clamped=true locked=true
      Coordinate SternumLRotX: default_value=0 range=(-0.25 0.25) clamped=true locked=true
      Coordinate SternumLRotY: default_value=0 range=(-0.25 0.25) clamped=true locked=true
      Coordinate SternumLX: default_value=0 range=(-0.15 0.15) clamped=true
      Coordinate SternumLY: default_value=0 range=(-0.15 0.15) clamped=true
      Coordinate SternumLZ: default_value=0 range=(-0.15 0.15) clamped=true
      PhysicalOffsetFrame torso_offset: socket_parent=/bodyset/torso translation=(0.06529632 0.3975856 -0.03721609)
      PhysicalOffsetFrame sternumL_offset: socket_parent=/bodyset/sternumL translation=(0 0 0)
      SpatialTransform:
        TransformAxis rotation1: coordinates=SternumLRotZ axis=(0 0 1) LinearFunction(coefficients=1 0)
        TransformAxis rotation2: coordinates=SternumLRotX axis=(-1 0 0) LinearFunction(coefficients=1 0)
        TransformAxis rotation3: coordinates=SternumLRotY axis=(0 -1 0) LinearFunction(coefficients=1 0)
        TransformAxis translation1: coordinates=SternumLX axis=(1 0 0) LinearFunction(coefficients=1 0)
        TransformAxis translation2: coordinates=SternumLY axis=(0 1 0) LinearFunction(coefficients=1 0)
        TransformAxis translation3: coordinates=SternumLZ axis=(0 0 1) LinearFunction(coefficients=1 0)
    WeldJoint sterR_clavR_jnt: socket_parent_frame=sternumR_offset socket_child_frame=clavicle_R_offset
      PhysicalOffsetFrame sternumR_offset: socket_parent=/bodyset/sternumR translation=(0 0 0)
          orientation=(0 -0.2618 0) [radians]
      PhysicalOffsetFrame clavicle_R_offset: socket_parent=/bodyset/clavicle_R translation=(0 0 0)
    WeldJoint clavR_scapR_jnt: socket_parent_frame=clavicle_R_offset socket_child_frame=scapula_R_offset
      PhysicalOffsetFrame clavicle_R_offset: socket_parent=/bodyset/clavicle_R
          translation=(-0.01537863 0.02153866 0.1328159) orientation=(0 0.34907 0)
      PhysicalOffsetFrame scapula_R_offset: socket_parent=/bodyset/scapula_R translation=(0 0 0)
    CustomJoint Shoulder_R: socket_parent_frame=scapula_R_offset socket_child_frame=humerus_R_offset
      Coordinate shoulder_add_r: default_value=0 range=(-2.994395 1.570796) clamped=false
      Coordinate shoulder_flex_r: default_value=0 range=(-2.570796 3.05708) clamped=false
      Coordinate shoulder_rot_r: default_value=0 range=(-4.15708 2.05708) clamped=false
      PhysicalOffsetFrame scapula_R_offset: socket_parent=/bodyset/scapula_R
          translation=(-0.01029713 -0.03648802 0.008819115)
      PhysicalOffsetFrame humerus_R_offset: socket_parent=/bodyset/humerus_R translation=(0 0 0)
      SpatialTransform: axes_held_at_zero=(translation1 translation2 translation3)
        TransformAxis rotation1: coordinates=shoulder_add_r axis=(1 0 0) LinearFunction(coefficients=1 0)
        TransformAxis rotation2: coordinates=shoulder_flex_r axis=(0 0 1) LinearFunction(coefficients=1 0)
        TransformAxis rotation3: coordinates=shoulder_rot_r axis=(0 1 0) LinearFunction(coefficients=1 0)
    CustomJoint elbow: socket_parent_frame=humerus_R_offset socket_child_frame=ulna_R_offset
      Coordinate elbow_flexion_r: default_value=0 range=(0 3.2689) clamped=true
      Coordinate elbow_varus_valg_r: default_value=0 range=(-0.2 0.2) clamped=true locked=true
      PhysicalOffsetFrame humerus_R_offset: socket_parent=/bodyset/humerus_R
          translation=(0.005237128 -0.2493216 -0.01056011)
      PhysicalOffsetFrame ulna_R_offset: socket_parent=/bodyset/ulna_R translation=(0 0 0)
      SpatialTransform: axes_held_at_zero=(rotation2 translation1 translation2 translation3)
        TransformAxis rotation1: coordinates=elbow_flexion_r axis=(0.0494 0.0366 0.99811)
            LinearFunction(coefficients=1 0)
        TransformAxis rotation3: coordinates=elbow_varus_valg_r axis=(0.99811 0 -0.0494)
            LinearFunction(coefficients=1 0)
    CustomJoint radioulnar: socket_parent_frame=ulna_R_offset socket_child_frame=radius_R_offset
      Coordinate pro_sup_r: default_value=0 range=(-1.5708 1.5708) clamped=true locked=true
      PhysicalOffsetFrame ulna_R_offset: socket_parent=/bodyset/ulna_R
          translation=(0.0003499277 -0.01006305 0.01749551)
      PhysicalOffsetFrame radius_R_offset: socket_parent=/bodyset/radius_R translation=(0 0 0)
      SpatialTransform: axes_held_at_zero=(rotation2 rotation3 translation1 translation2 translation3)
        TransformAxis rotation1: coordinates=pro_sup_r axis=(-0.017161 0.99267 -0.11967)
            LinearFunction(coefficients=1 0)
    CustomJoint radius_hand_r: socket_parent_frame=radius_R_offset socket_child_frame=hand_R_offset
      Coordinate wrist_dev_r: default_value=0 range=(-0.43633 0.61087) clamped=true locked=true
      Coordinate wrist_flex_r: default_value=0 range=(-1.55 1.55) clamped=true locked=true
      PhysicalOffsetFrame radius_R_offset: socket_parent=/bodyset/radius_R
          translation=(0.01574675 -0.2117062 0.02187048)
      PhysicalOffsetFrame hand_R_offset: socket_parent=/bodyset/hand_R translation=(0 0 0)
      SpatialTransform: axes_held_at_zero=(rotation3 translation1 translation2 translation3)
        TransformAxis rotation1: coordinates=wrist_dev_r axis=(-0.81906 -0.13561 -0.55744)
          SimmSpline: x=(-0.17453 0 0.43633) y=(-0.17453 0 0.43633)
        TransformAxis rotation2: coordinates=wrist_flex_r axis=(0.95643 -0.25221 0.1471)
          SimmSpline: x=(-1.5708 1.5708) y=(-0.7854 0.7854)
    WeldJoint sterL_clavL_jnt: socket_parent_frame=sternumL_offset socket_child_frame=clavicle_L_offset
      PhysicalOffsetFrame sternumL_offset: socket_parent=/bodyset/sternumL translation=(0 0 0) orientation=(0 0.2618 0)
      PhysicalOffsetFrame clavicle_L_offset: socket_parent=/bodyset/clavicle_L translation=(0 0 0)
    WeldJoint clavL_scapL_jnt: socket_parent_frame=clavicle_L_offset socket_child_frame=scapula_L_offset
      PhysicalOffsetFrame clavicle_L_offset: socket_parent=/bodyset/clavicle_L
          translation=(-0.01537863 0.02153866 -0.1328159) orientation=(0 -0.34907 0)
      PhysicalOffsetFrame scapula_L_offset: socket_parent=/bodyset/scapula_L translation=(0 0 0)
    CustomJoint Shoulder_L: socket_parent_frame=scapula_L_offset socket_child_frame=humerus_L_offset
      Coordinate shoulder_add_l: default_value=0 range=(-2.994395 1.570796) clamped=false
      Coordinate shoulder_flex_l: default_value=0 range=(-2.570796 3.05708) clamped=false
      Coordinate shoulder_rot_l: default_value=0 range=(-4.15708 2.05708) clamped=false
      PhysicalOffsetFrame scapula_L_offset: socket_parent=/bodyset/scapula_L
          translation=(-0.01029713 -0.03648802 0.008819115)
      PhysicalOffsetFrame humerus_L_offset: socket_parent=/bodyset/humerus_L translation=(0 0 0)
      SpatialTransform: axes_held_at_zero=(translation1 translation2 translation3)
        TransformAxis rotation1: coordinates=shoulder_add_l axis=(1 0 0) LinearFunction(coefficients=1 0)
        TransformAxis rotation2: coordinates=shoulder_flex_l axis=(0 0 1) LinearFunction(coefficients=1 0)
        TransformAxis rotation3: coordinates=shoulder_rot_l axis=(0 1 0) LinearFunction(coefficients=1 0)
    CustomJoint elbow_l: socket_parent_frame=humerus_L_offset socket_child_frame=ulna_L_offset
      Coordinate elbow_flexion_l: default_value=0 range=(0 3.2689) clamped=true
      Coordinate elbow_varus_valg_l: default_value=0 range=(-0.2 0.2) clamped=true locked=true
      PhysicalOffsetFrame humerus_L_offset: socket_parent=/bodyset/humerus_L
          translation=(0.005695742 -0.2711547 0.01148486)
      PhysicalOffsetFrame ulna_L_offset: socket_parent=/bodyset/ulna_L translation=(0 0 0)
      SpatialTransform: axes_held_at_zero=(rotation2 translation1 translation2 translation3)
        TransformAxis rotation1: coordinates=elbow_flexion_l axis=(0.0494 -0.0366 0.99811)
            LinearFunction(coefficients=1 0)
        TransformAxis rotation3: coordinates=elbow_varus_valg_l axis=(0.99811 0 -0.0494)
            LinearFunction(coefficients=1 0)
    CustomJoint radioulnar_l: socket_parent_frame=ulna_L_offset socket_child_frame=radius_L_offset
      Coordinate pro_sup_l: default_value=0 range=(-1.5708 1.5708) clamped=true locked=true
      PhysicalOffsetFrame ulna_L_offset: socket_parent=/bodyset/ulna_L
          translation=(0.0003490475 -0.01003773 -0.0174515)
      PhysicalOffsetFrame radius_L_offset: socket_parent=/bodyset/radius_L translation=(0 0 0)
      SpatialTransform: axes_held_at_zero=(rotation2 rotation3 translation1 translation2 translation3)
        TransformAxis rotation1: coordinates=pro_sup_l axis=(0.017161 -0.99267 -0.11967)
            LinearFunction(coefficients=1 0)
    CustomJoint radius_hand_l: socket_parent_frame=radius_L_offset socket_child_frame=hand_L_offset
      Coordinate wrist_dev_l: default_value=0 range=(-0.43633 0.61087) clamped=true locked=true
      Coordinate wrist_flex_l: default_value=0 range=(-1.55 1.55) clamped=true locked=true
      PhysicalOffsetFrame radius_L_offset: socket_parent=/bodyset/radius_L
          translation=(0.01570714 -0.2111737 -0.02181547)
      PhysicalOffsetFrame hand_L_offset: socket_parent=/bodyset/hand_L translation=(0 0 0)
      SpatialTransform: axes_held_at_zero=(rotation3 translation1 translation2 translation3)
        TransformAxis rotation1: coordinates=wrist_dev_l axis=(-0.81906 -0.13561 -0.55744)
          SimmSpline: x=(-0.17453 0 0.43633) y=(-0.17453 0 0.43633)
        TransformAxis rotation2: coordinates=wrist_flex_l axis=(0.95643 -0.25221 0.1471)
          SimmSpline: x=(-1.5708 1.5708) y=(-0.7854 0.7854)
    CustomJoint hip_r: socket_parent_frame=pelvis_offset socket_child_frame=femur_r_offset
      Coordinate hip_flexion_r: default_value=0 range=(-2.094395 2.694395) clamped=true
      Coordinate hip_adduction_r: default_value=0 range=(-2.094395 2.094395) clamped=true
      Coordinate hip_rotation_r: default_value=0 range=(-2.094395 2.094395) clamped=true
      PhysicalOffsetFrame pelvis_offset: socket_parent=/bodyset/pelvis translation=(-0.06283545 -0.07882683 0.09957701)
      PhysicalOffsetFrame femur_r_offset: socket_parent=/bodyset/femur_r translation=(0 0 0)
      SpatialTransform: axes_held_at_zero=(translation1 translation2 translation3)
        TransformAxis rotation1: coordinates=hip_flexion_r axis=(0 0 1) LinearFunction(coefficients=1 0)
        TransformAxis rotation2: coordinates=hip_adduction_r axis=(1 0 0) LinearFunction(coefficients=1 0)
        TransformAxis rotation3: coordinates=hip_rotation_r axis=(0 1 0) LinearFunction(coefficients=1 0)
    CustomJoint knee_r: socket_parent_frame=femur_r_offset socket_child_frame=tibia_r_offset
      Coordinate knee_angle_r: default_value=3.432333e-10 range=(-2.694395 0.1745329) clamped=true
      Coordinate knee_rotation_r: default_value=2.588678e-30 range=(-0.26 0.26) clamped=true
      Coordinate knee_adduction_r: default_value=-1.765715e-27 range=(-0.087 0.087) clamped=true
      Coordinate knee_tz_r: default_value=0 range=(-0.02 0.02) clamped=false locked=true
      PhysicalOffsetFrame femur_r_offset: socket_parent=/bodyset/femur_r translation=(0 0 0)
      PhysicalOffsetFrame tibia_r_offset: socket_parent=/bodyset/tibia_r translation=(0 0 0)
      SpatialTransform:
        TransformAxis rotation1: coordinates=knee_angle_r axis=(0 0 1) LinearFunction(coefficients=1 0)
        TransformAxis rotation2: coordinates=knee_rotation_r axis=(0 1 0) LinearFunction(coefficients=1 0)
        TransformAxis rotation3: coordinates=knee_adduction_r axis=(1 0 0) LinearFunction(coefficients=1 0)
        TransformAxis translation1: coordinates=knee_angle_r axis=(1 0 0)
          MultiplierFunction: scale=0.9504616
            SimmSpline: x=(-2.0944 -1.74533 -1.39626 -1.0472 -0.698132 -0.349066 -0.174533 0.197344 0.337395 0.490178 1.52146 2.0944)
                y=(-0.0032 0.00179 0.00411 0.0041 0.00212 -0.001 -0.0031 -0.005227 -0.005435 -0.005574 -0.005435 -0.00525)
        TransformAxis translation2: coordinates=knee_angle_r axis=(0 1 0)
          MultiplierFunction: scale=0.9504616
            SimmSpline: x=(-2.0944 -1.22173 -0.523599 -0.349066 -0.174533 0.159149 2.0944)
                y=(-0.42 -0.402 -0.398 -0.397 -0.3966 -0.395264 -0.396)
        TransformAxis translation3: coordinates=knee_tz_r axis=(0 0 1) LinearFunction(coefficients=1 0)
    CustomJoint ankle_r: socket_parent_frame=tibia_r_offset socket_child_frame=talus_r_offset
      Coordinate ankle_angle_r: default_value=0 range=(-1.570796 1.570796) clamped=true
      PhysicalOffsetFrame tibia_r_offset: socket_parent=/bodyset/tibia_r translation=(0 -0.448262 0)
      PhysicalOffsetFrame talus_r_offset: socket_parent=/bodyset/talus_r translation=(0 0 0)
      SpatialTransform: axes_held_at_zero=(rotation2 rotation3 translation1 translation2 translation3)
        TransformAxis rotation1: coordinates=ankle_angle_r axis=(-0.1050135 -0.1740224 0.9791263)
            LinearFunction(coefficients=1 0)
    CustomJoint subtalar_r: socket_parent_frame=talus_r_offset socket_child_frame=calcn_r_offset
      Coordinate subtalar_angle_r: default_value=0 range=(-0.436 0.436) clamped=true
      PhysicalOffsetFrame talus_r_offset: socket_parent=/bodyset/talus_r translation=(-0.04877 -0.04195 0.00792)
      PhysicalOffsetFrame calcn_r_offset: socket_parent=/bodyset/calcn_r translation=(0 0 0)
      SpatialTransform: axes_held_at_zero=(rotation2 rotation3 translation1 translation2 translation3)
        TransformAxis rotation1: coordinates=subtalar_angle_r axis=(0.7871796 0.6047475 -0.1209495)
            LinearFunction(coefficients=1 0)
    CustomJoint mtp_r: socket_parent_frame=calcn_r_offset socket_child_frame=toes_r_offset
      Coordinate mtp_angle_r: default_value=0 range=(-1.570796 1.570796) clamped=false locked=true
      PhysicalOffsetFrame calcn_r_offset: socket_parent=/bodyset/calcn_r
          translation=(0.1578644 -0.001765821 0.0009535433)
      PhysicalOffsetFrame toes_r_offset: socket_parent=/bodyset/toes_r translation=(0 0 0)
      SpatialTransform: axes_held_at_zero=(rotation2 rotation3 translation1 translation2 translation3)
        TransformAxis rotation1: coordinates=mtp_angle_r axis=(-0.5809544 0 0.8139361) LinearFunction(coefficients=1 0)
    CustomJoint hip_l: socket_parent_frame=pelvis_offset socket_child_frame=femur_l_offset
      Coordinate hip_flexion_l: default_value=0 range=(-2.094395 2.694395) clamped=true
      Coordinate hip_adduction_l: default_value=0 range=(-2.094395 2.094395) clamped=true
      Coordinate hip_rotation_l: default_value=0 range=(-2.094395 2.094395) clamped=true
      PhysicalOffsetFrame pelvis_offset: socket_parent=/bodyset/pelvis
          translation=(-0.06283545 -0.07882683 -0.09957701)
      PhysicalOffsetFrame femur_l_offset: socket_parent=/bodyset/femur_l translation=(0 0 0)
      SpatialTransform: axes_held_at_zero=(translation1 translation2 translation3)
        TransformAxis rotation1: coordinates=hip_flexion_l axis=(0 0 1) LinearFunction(coefficients=1 0)
        TransformAxis rotation2: coordinates=hip_adduction_l axis=(-1 0 0) LinearFunction(coefficients=1 0)
        TransformAxis rotation3: coordinates=hip_rotation_l axis=(0 -1 0) LinearFunction(coefficients=1 0)
    CustomJoint knee_l: socket_parent_frame=femur_l_offset socket_child_frame=tibia_l_offset
      Coordinate knee_angle_l: default_value=3.432317e-10 range=(-2.694395 0.1745329) clamped=true
      Coordinate knee_rotation_l: default_value=0 range=(-0.26 0.26) clamped=true
      Coordinate knee_adduction_l: default_value=0 range=(-0.087 0.087) clamped=true
      Coordinate knee_tz_l: default_value=0 range=(-0.02 0.02) clamped=false locked=true
      PhysicalOffsetFrame femur_l_offset: socket_parent=/bodyset/femur_l translation=(0 0 0)
      PhysicalOffsetFrame tibia_l_offset: socket_parent=/bodyset/tibia_l translation=(0 0 0)
      SpatialTransform:
        TransformAxis rotation1: coordinates=knee_angle_l axis=(0 0 1) LinearFunction(coefficients=1 0)
        TransformAxis rotation2: coordinates=knee_rotation_l axis=(0 -1 0) LinearFunction(coefficients=1 0)
        TransformAxis rotation3: coordinates=knee_adduction_l axis=(-1 0 0) LinearFunction(coefficients=1 0)
        TransformAxis translation1: coordinates=knee_angle_l axis=(1 0 0)
          MultiplierFunction: scale=0.9494647
            SimmSpline: x=(-2.0944 -1.74533 -1.39626 -1.0472 -0.698132 -0.349066 -0.174533 0.197344 0.337395 0.490178 1.52146 2.0944)
                y=(-0.0032 0.00179 0.00411 0.0041 0.00212 -0.001 -0.0031 -0.005227 -0.005435 -0.005574 -0.005435 -0.00525)
        TransformAxis translation2: coordinates=knee_angle_l axis=(0 1 0)
          MultiplierFunction: scale=0.9494647
            SimmSpline: x=(-2.0944 -1.22173 -0.523599 -0.349066 -0.174533 0.159149 2.0944)
                y=(-0.4226 -0.4082 -0.399 -0.3976 -0.3966 -0.395264 -0.396)
        TransformAxis translation3: coordinates=knee_tz_l axis=(0 0 1) LinearFunction(coefficients=1 0)
    CustomJoint ankle_l: socket_parent_frame=tibia_l_offset socket_child_frame=talus_l_offset
      Coordinate ankle_angle_l: default_value=0 range=(-1.047198 1.047198) clamped=true
      PhysicalOffsetFrame tibia_l_offset: socket_parent=/bodyset/tibia_l translation=(0 -0.4537347 0)
      PhysicalOffsetFrame talus_l_offset: socket_parent=/bodyset/talus_l translation=(0 0 0)
      SpatialTransform: axes_held_at_zero=(rotation2 rotation3 translation1 translation2 translation3)
        TransformAxis rotation1: coordinates=ankle_angle_l axis=(0.1050135 0.1740224 0.9791263)
            LinearFunction(coefficients=1 0)
    CustomJoint subtalar_l: socket_parent_frame=talus_l_offset socket_child_frame=calcn_l_offset
      Coordinate subtalar_angle_l: default_value=0 range=(-0.436 0.436) clamped=true
      PhysicalOffsetFrame talus_l_offset: socket_parent=/bodyset/talus_l translation=(-0.04877 -0.04195 -0.00792)
      PhysicalOffsetFrame calcn_l_offset: socket_parent=/bodyset/calcn_l translation=(0 0 0)
      SpatialTransform: axes_held_at_zero=(rotation2 rotation3 translation1 translation2 translation3)
        TransformAxis rotation1: coordinates=subtalar_angle_l axis=(-0.7871796 -0.6047475 -0.1209495)
            LinearFunction(coefficients=1 0)
    CustomJoint mtp_l: socket_parent_frame=calcn_l_offset socket_child_frame=toes_l_offset
      Coordinate mtp_angle_l: default_value=0 range=(-1.047198 1.047198) clamped=false locked=true
      PhysicalOffsetFrame calcn_l_offset: socket_parent=/bodyset/calcn_l
          translation=(0.1519337 -0.001699482 -0.0009177201)
      PhysicalOffsetFrame toes_l_offset: socket_parent=/bodyset/toes_l translation=(0 0 0)
      SpatialTransform: axes_held_at_zero=(rotation2 rotation3 translation1 translation2 translation3)
        TransformAxis rotation1: coordinates=mtp_angle_l axis=(0.5809544 0 0.8139361) LinearFunction(coefficients=1 0)
  MarkerSet:
    Marker asis_r: pelvis (-0.01902469 -0.0229599 0.1477785) fixed=true
    Marker asis_l: pelvis (-0.01550268 -0.02032557 -0.1438249) fixed=true
    Marker psi_r: pelvis (-0.1469051 0.01332348 0.04971107) fixed=true
    Marker psi_l: pelvis (-0.1414001 0.0122591 -0.04962629) fixed=true
    Marker mtoe_r: calcn_r (0.2247719 0.01167433 -0.01828758) fixed=true
    Marker ltoe_r: calcn_r (0.1740026 0.003788527 0.04218377) fixed=true
    Marker foot_r_1: calcn_r (0.2094016 0.003788527 0.002423064) fixed=true
    Marker foot_r_3: calcn_r (0.1955378 0.003788527 0.02463181) fixed=true
    Marker foot_r_5: calcn_r (0.1513385 0.02446606 -0.02476416) fixed=true
    Marker foot_r_6: calcn_r (0.1411236 0.02764429 0.00897057) fixed=true
    Marker foot_r_7: calcn_r (0.131226 0.01343075 0.03580631) fixed=true
    Marker mtoe_l: calcn_l (0.2135861 0.008667577 0.02282558) fixed=true
    Marker ltoe_l: calcn_l (0.1684831 -0.002210707 -0.04878876) fixed=true
    Marker foot_l_1: calcn_l (0.1930537 -0.002210707 -0.02105587) fixed=true
    Marker foot_l_0: calcn_l (0.1869434 -0.002210707 -0.03438516) fixed=true
    Marker foot_l_7: calcn_l (0.1038811 0.02807677 -0.04267707) fixed=true
    Marker foot_l_4: calcn_l (0.1999975 -0.002210707 -0.004712939) fixed=true
    Marker foot_l_5: calcn_l (0.1502535 0.01379103 -0.01389966) fixed=true
    Marker foot_l_6: calcn_l (0.1234229 0.02609778 0.01096987) fixed=true
    Marker head: head_neck (-0.01689681 0.2770464 0.001604055) fixed=true
    Marker mhnd_r: hand_R (-0.02511147 -0.06873854 0.005110247)
    Marker lhnd_r: hand_R (0.02403958 -0.08029073 0.0229922)
    Marker lhnd_l: hand_L (0.02639579 -0.08189505 -0.01986706)
    Marker mhnd_l: hand_L (-0.02409621 -0.07214973 -0.005329737)
    Marker shoulder_r: humerus_R (0 0 0)
    Marker up_arm_r_0: humerus_R (0.04490859 -0.1227803 0.007200655)
    Marker up_arm_r_5: humerus_R (-0.03460366 -0.149913 0.0001193762)
    Marker shoulder_l: humerus_L (0 0 0)
    Marker up_arm_l_0: humerus_L (-0.004907419 -0.05606805 -0.02729334)
    Marker up_arm_l_5: humerus_L (-0.0170088 -0.1944402 0.04592814)
    Marker neck: torso (-0.01807226 0.4061492 0)
    Marker elbow_r: radius_R (-0.0003499277 0.01006305 -0.01749551) fixed=true
    Marker wrist_r: hand_R (0 0 0) fixed=true
    Marker elbow_l: radius_L (-0.0003490475 0.01003773 0.0174515) fixed=true
    Marker wrist_l: hand_L (0 0 0) fixed=true
    Marker hip_r: femur_r (0 0 0) fixed=true
    Marker thigh_r_2: femur_r (0 -0.2045362 -0.01726218) fixed=true
    Marker thigh_r_3: femur_r (0 -0.2392639 0.07550523) fixed=true
    Marker hip_l: femur_l (0 0 0) fixed=true
    Marker thigh_l_1: femur_l (-0.009416754 -0.2684993 0.04485853) fixed=true
    Marker thigh_l_5: femur_l (0.03538253 -0.1030953 -0.09155894) fixed=true
    Marker knee_r: tibia_r (0 0 0) fixed=true
    Marker shank_r_1: tibia_r (-5.933715e-11 -0.172877 0.06359466) fixed=true
    Marker shank_r_2: tibia_r (-7.283114e-11 -0.2121913 -0.03901186) fixed=true
    Marker ankle_r: tibia_r (-0.005212118 -0.4053123 0.005986767) fixed=true
    Marker knee_l: tibia_l (0 0 0) fixed=true
    Marker shank_l_0: tibia_l (0.01030422 -0.3113428 -0.07023038) fixed=true
    Marker shank_l_4: tibia_l (-5.440455e-11 -0.1585068 0.05152479) fixed=true
    Marker ankle_l: tibia_l (-0.00527572 -0.4102606 0.0004708665) fixed=true
    Marker heel_r: calcn_r (0.02527028 0.02455407 -0.005856175) fixed=true
    Marker heel_l: calcn_l (0.01757158 0.01874557 0.002972956) fixed=true
    Marker nose: head_neck (0.1323666 0.1300647 0.001804575) fixed=true
    Marker l_lat_knee: femur_l (0.009152461 -0.3818345 -0.046628) fixed=true
    Marker r_med_wrist: radius_R (-0.01182277 -0.2048498 0.02168697) fixed=true
    Marker l_lat_ankle: tibia_l (-0.006306533 -0.4261773 -0.05545283) fixed=true
    Marker r_med_ankle: tibia_r (0.006229022 -0.4158809 -0.03085279) fixed=true
    Marker r_lat_knee: femur_r (-3.343901e-6 -0.3856439 0.04127267) fixed=true
    Marker xiphoid: torso (0.1014029 0.2455661 0.003428344) fixed=true
    Marker l_med_ankle: tibia_l (0.007073024 -0.4224751 0.03323698) fixed=true
    Marker r_med_knee: femur_r (0.0008672508 -0.3817002 -0.04045105) fixed=true
    Marker l_med_elbow: humerus_L (-0.002380772 -0.2608218 0.04643235) fixed=true
    Marker navel: torso (0.1454889 0.02367465 0.003428344) fixed=true
    Marker r_lat_elbow: humerus_R (0.006299634 -0.244669 0.02730271) fixed=true
    Marker r_lat_wrist: radius_R (0.04491309 -0.2037437 0.01365797) fixed=true
    Marker l_med_wrist: radius_L (-0.01426 -0.2028804 -0.02571265) fixed=true
    Marker l_lat_elbow: humerus_L (0.0008866471 -0.2615983 -0.02841786) fixed=true
    Marker l_med_knee: femur_l (0.009266221 -0.3771778 0.046151) fixed=true
    Marker r_med_elbow: humerus_R (0.003259131 -0.24215 -0.04494311) fixed=true
    Marker r_lat_ankle: tibia_r (0.001135151 -0.4237009 0.05513336) fixed=true
    Marker l_lat_wrist: radius_L (0.04367717 -0.2009163 -0.02653272) fixed=true
    Marker chin: head_neck (0.1269508 0.05327219 0.003392481) fixed=true
    Marker T10: torso (-0.09990056 0.2312328 0.003428344) fixed=true
    Marker l_ear: head_neck (0.02852595 0.1356934 -0.08532158) fixed=true
    Marker r_ear: head_neck (0.02658679 0.1356934 0.08337551) fixed=true
    Marker r_eye: head_neck (0.126339 0.161037 0.033805) fixed=true
    Marker l_eye: head_neck (0.126339 0.1596376 -0.03418524) fixed=true
    Marker spinal_cord_8: torso (-0.07583645 0.4601745 -0.0008179129) fixed=true
    Marker spinal_cord_12: torso (-0.1130737 0.333518 -0.0001192306) fixed=true
    Marker spinal_cord_27: torso (-0.06362642 0.07857093 0.01696375) fixed=true
    Marker spinal_cord_33: torso (-0.08532488 0.223106 0.003428344) fixed=true
    Marker front_torso_11: torso (0.1014029 0.04750779 0.05016656) fixed=true
    Marker front_torso_7: torso (0.1441735 0.160768 0.005511121) fixed=true
    Marker front_torso_4: torso (0.1014029 0.291764 -0.06011177) fixed=true
    Marker front_torso_1: torso (0.1014029 0.0809269 -0.06492812) fixed=true
    Marker front_torso_10: torso (0.1039239 0.336751 0.08019655) fixed=true
